! DEFINE THE ANALYSIS OPTIONS
/SOLUTION
ANTYPE,MODAL
MODOPT,LANB,nmodes,,,,,,,,,,

! LOAD K and M MATRICES FROM EXISTING FILES
*SMAT,MatK,D,IMPORT,HBMAT,K.hbmat,BINARY
*SMAT,MatM,D,IMPORT,HBMAT,M.hbmat,BINARY

! LAUNCH THE ALGORITHM, APPLIED TO THE GIVEN MATRICES
*EIGEN,MatK,MatM,,VecLambda,MatPhi

! export solution
*EXPORT,MatPhi,MMF,Phi.mmf
*EXPORT,VecLambda,MMF,Lambda.mmf
FINISH
